!材性
!节点域刚度，比杆件大10倍左右
MP, EX,      1,     7.000e+011
MP, NUXY,    1,     3.000e-001
!铝合金的刚度
MP, EX,      2,     7.000e+010
MP, NUXY,    2,     3.000e-001

!梁
ET,        1, BEAM188
KEYOPT,    1, 3, 2  !打开高阶形函数的开关
!keyopt,1,1,1

!梁截面
R,     1, 0
SecType,     1, Beam, I,,1
SECOFFSET,CENT
SECDATA,0.050000,0.050000,0.100000,0.005000,0.005000,0.004000,0,0,0,0
