!!!!!!!!!!!!!!!!!!!!!!!!!!!!!!!!!!!!!!!!!
!!!!第02讲：求解单层球面网壳的临界荷载
!!!!算例ex02a-beam188未设置keyopt，沿长度方向还是线性形函数
!!!!!!!!!!!!!!!!!!!!!!!!!!!!!!!!!!!!!!!!!
finish
/clear
/filname,ex02a

!!!!!参数输入
/prep7
PI=3.1415926535
R=15    !!球面半径
f=5   !!网壳矢高
Nr=8  !!径向划分数量
Nc=24 !!环向划分数量
alf=acos((R-f)/R)*180/PI        !!圆心角(度）
alf0=90-alf                      !!起始圆心角
dalf=alf/Nr                        !!每个网格对应的圆心角
dbeta=360/Nc
Ex=2.06e11        !!弹性模量
Nu=0.3              !!泊松比
b=0.08                !!方管截面宽度
h=0.15                !!方管截面高度
t=0.006                !!方管管壁厚度
Fz=10000          !!节点荷载

!!!!!前处理
/prep7
et,1,beam188        !!定义单元类型
mp,ex,1,Ex          !!定义材料特性
mp,nuxy,1,Nu
sectype,1,beam,hrec,,1  !!定义截面类型
secoffset,cent                     !!截面按形心对中
secdata,b,h,t,t,t,t            !!定义截面参数

!!!!!定义节点
Nnode=Nc*Nr+1          !!节点总数
N,Nnode+1,0,0,0        !!球心
N,Nnode,0,0,R          !!顶点
csys,2                        !!球面坐标系
*do,i,1,Nr
  *do,j,1,Nc
    inode=Nc*(i-1)+j            !!当前节点号
    n,inode,R,(j-1)*dbeta,alf0+(i-1)*dalf
  *enddo
*enddo
csys,0                        !!直角坐标系

!!!!!定义单元
type,1
secnum,1
mat,1
*do,i,1,Nr                              !!定义环向杆件
  *do,j,1,Nc
    inode=Nc*(i-1)+j            !!每环首节点号
    *if,j,ne,Nc,then
      e,inode,inode+1,Nnode+1
    *else
      e,inode,inode-Nc+1,Nnode+1
    *endif
  *enddo
*enddo
*do,i,1,Nr                              !!定义径向杆件
  *do,j,1,Nc
    inode=Nc*(i-1)+j            !!每环首节点号
    *if,i,ne,Nr,then
      e,inode,inode+Nc,Nnode+1
    *else
      e,inode,Nnode,Nnode+1
    *endif
  *enddo
*enddo

!!!!施加约束
nsel,s,,,1,Nc
d,all,ux,0
d,all,uy,0
d,all,uz,0

!!!施加荷载
nsel,s,,,Nc+1,Nnode
f,all,fz,-Fz
nsel,all

!!!首先进行静力分析
/solu
antype,0
pstres,on         !!!打开预应力开关
solve
finish                 !!!结束当前求解

!!!然后进行屈曲分析
/solu
antype,1  !屈曲分析
bucopt,lanb,10 !求10个屈曲模态
mxpand,10,,,1 !扩展10个屈曲模态
solve

!!!后处理
/post1
set,1,1
plnsol,u,z,0,1.0

!!!显示设置
/view,1,1,1,1
/ang,1
/ang,1,-120,zs,1
/rep,fast


!!!讲课中需修改的命令流
!keyopt,1,3,2        !!定义形函数精度
!et,1,beam44        !!定义单元类型
